*Heading
** Job name: Job-1 Model name: Model-1
** Generated by: Abaqus/CAE Student Edition 2021
*Preprint, echo=NO, model=NO, history=NO, contact=NO
**
** PARTS
**
*Part, name=Part-1
*End Part
**
**
** ASSEMBLY
**
*Assembly, name=Assembly
**
*Instance, name=Part-1-1, part=Part-1
*Node
      1,           0.,  0.500995517
      2,           0.,           5.
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*Element, type=CPS3
 1, 758, 643, 697
 2, 938, 689, 634
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*Element, type=CPS4R
 17,   7, 121, 194,   8
 18, 235, 232, 113, 122
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*Nset, nset=Set-1, generate
   1,  959,    1
*Elset, elset=Set-1, generate
   1,  910,    1
** Section: Section-1
*Solid Section, elset=Set-1, material=Material-1
,
*End Instance
**
*Nset, nset=Disp, instance=Part-1-1
   2,  11,  93,  94,  95,  96
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*Elset, elset=Disp, instance=Part-1-1
  51,  67,  68,  97,  98, 106
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*Nset, nset=Xsymm, instance=Part-1-1
  1,  2, 12, 13, 14, 15
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*Elset, elset=Xsymm, instance=Part-1-1
  19,  20,  25,  26,  28,  29
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*Nset, nset=Ysymm, instance=Part-1-1
  9, 10, 45, 46, 47, 48, 49, 50, 51, 52, 53, 54, 55, 56, 57
*Elset, elset=Ysymm, instance=Part-1-1
  24,  54,  61,  62,  64,  65,  66, 123, 124, 178, 179, 180, 183, 249
*End Assembly
*Amplitude, name=Amp-1
             0.,              0.,            0.01,              1.
**
** MATERIALS
**
*Material, name=Material-1
*Density
 7.85e-09,
*Elastic
210000., 0.3
*Plastic
  127.22,     0.
  590.19, 0.0005
  634.92,  0.001
  695.71,  0.002
  741.01,  0.003
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 1237.89,   1.99
** ----------------------------------------------------------------
**
** STEP: Step-1
**
*Step, name=Step-1, nlgeom=YES
*Dynamic, Explicit
, 0.01
*Bulk Viscosity
0.06, 1.2
**
** BOUNDARY CONDITIONS
**
** Name: BC-1 Type: Symmetry/Antisymmetry/Encastre
*Boundary
Xsymm, XSYMM
** Name: BC-2 Type: Symmetry/Antisymmetry/Encastre
*Boundary
Ysymm, YSYMM
** Name: BC-3 Type: Displacement/Rotation
*Boundary, amplitude=Amp-1
Disp, 2, 2, 0.5
**
** OUTPUT REQUESTS
**
*Restart, write, number interval=1, time marks=NO
**
** FIELD OUTPUT: F-Output-1
**
*Output, field
*Node Output
RF, U
*Element Output, directions=YES
PEEQ, S
**
** HISTORY OUTPUT: H-Output-1
**
*Output, history, variable=PRESELECT
*End Step
